# 快速热导率计算输入脚本
# 用于跑通 NEMD 热流和温度梯度统计流程，并忽略分子间非键作用力。
# 当前模式适合筛选和流程验证，正式计算需要补充完整力场参数。

units           real
dimension       3
atom_style      full
boundary        p p p

variable        T_equil   equal 300.0
variable        T_hot     equal 450.0
variable        T_cold    equal 150.0
variable        dt        equal 0.5
variable        tdamp     equal 50.0
variable        rc        equal 12.0

# 当前 data 文件只有拓扑和坐标，没有完整非键/键参数。
# pair_style zero 用来忽略所有 pair 力；neigh_modify 行保留“忽略分子间作用力”的显式设置。
pair_style      zero ${rc}
bond_style      harmonic

read_data       outputs/systems/candidate_002_system.data

# 将所有 bond type 的力常数置零，使脚本可以在缺少真实力场时快速跑通。
pair_coeff      * *
bond_coeff      * 0.0 1.0
special_bonds   lj/coul 0.0 0.0 0.5
neigh_modify    exclude molecule/inter all

neighbor        2.0 bin
neigh_modify    every 1 delay 0 check yes

timestep        ${dt}
thermo          1000
thermo_style    custom step temp press vol etotal
thermo_modify   flush yes

velocity        all create ${T_equil} 87287 dist gaussian

# 先做短时间 NVE，让速度场稳定；快速模式不做长时间压缩和退火。
fix             eq all nve
run             5000
unfix           eq

variable        xlo_now equal xlo
variable        xhi_now equal xhi
variable        ylo_now equal ylo
variable        yhi_now equal yhi
variable        zlo_now equal zlo
variable        zhi_now equal zhi
variable        Lx equal v_xhi_now-v_xlo_now
variable        Ly equal v_yhi_now-v_ylo_now
variable        Lz equal v_zhi_now-v_zlo_now

variable        fix_thick  equal 0.05*v_Lx
variable        src_thick  equal 0.1*v_Lx
variable        flux_thick equal 0.1*v_Lx

variable        bottom_fix_bottom equal v_xlo_now
variable        bottom_fix_top    equal v_xlo_now+v_fix_thick
variable        hot_bottom        equal v_bottom_fix_top
variable        hot_top           equal v_hot_bottom+v_src_thick
variable        cold_top          equal v_xhi_now-v_fix_thick
variable        cold_bottom       equal v_cold_top-v_src_thick
variable        top_fix_bottom    equal v_cold_top
variable        top_fix_top       equal v_xhi_now

region          bottomfix block v_bottom_fix_bottom v_bottom_fix_top INF INF INF INF
region          topfix    block v_top_fix_bottom v_top_fix_top INF INF INF INF
region          hot       block v_hot_bottom v_hot_top INF INF INF INF
region          cold      block v_cold_bottom v_cold_top INF INF INF INF

group           bottomfix region bottomfix
group           topfix    region topfix
group           hot       region hot
group           cold      region cold
group           mobile    subtract all bottomfix topfix

variable        flux_center equal (v_xlo_now+v_xhi_now)/2.0
variable        flux_bottom equal v_flux_center-v_flux_thick/2.0
variable        flux_top    equal v_flux_center+v_flux_thick/2.0
region          flux block v_flux_bottom v_flux_top INF INF INF INF
group           flux region flux

compute         Thot all temp/region hot
compute         Tcold all temp/region cold

fix             freeze1 bottomfix setforce 0.0 0.0 0.0
fix             freeze2 topfix setforce 0.0 0.0 0.0
velocity        bottomfix set 0.0 0.0 0.0
velocity        topfix set 0.0 0.0 0.0

fix             int mobile nve
fix             fhot all langevin ${T_hot} ${T_hot} ${tdamp} 699483 tally yes
fix             fcold all langevin ${T_cold} ${T_cold} ${tdamp} 399481 tally yes
fix_modify      fhot temp Thot
fix_modify      fcold temp Tcold

# 用热源和冷源能量交换的平均值估算输入热流。
variable        area equal v_Ly*v_Lz
variable        elapsed_time equal step*v_dt
variable        Qin equal abs(f_fhot)
variable        Qout equal abs(f_fcold)
variable        Jsource equal 0.5*(v_Qin+v_Qout)/(v_area*v_elapsed_time)

compute         myKE flux ke/atom
compute         myPE flux pe/atom
compute         myStress flux stress/atom NULL virial
compute         flux_vector flux heat/flux myKE myPE myStress
variable        Volume_flux equal v_Ly*v_Lz*v_flux_thick
variable        Jx equal c_flux_vector[1]/v_Volume_flux

fix             ave_flux all ave/time 10 100 1000 v_Jsource v_Jx file outputs/lammps/candidate_002_flux.profile
compute         layers all chunk/atom bin/1d x lower 1.0 units box
fix             ave_temp all ave/chunk 10 100 1000 layers temp norm sample file outputs/lammps/candidate_002_temp.profile

dump            traj all custom 5000 outputs/lammps/candidate_002_dump.lammpstrj id mol type x y z vx vy vz
thermo_style    custom step temp c_Thot c_Tcold v_Jsource v_Jx f_fhot f_fcold
run             20000

undump          traj
unfix           ave_temp
unfix           ave_flux
unfix           fhot
unfix           fcold
unfix           int
unfix           freeze1
unfix           freeze2
